log             log.sow-4c_FeS-2c_B_S append
units           real
atom_style      full
boundary        p p p

pair_style      lj/cut/coul/long 12.500
bond_style      harmonic
angle_style     hybrid cosine/periodic fourier
dihedral_style  harmonic
improper_style  fourier
kspace_style    ewald 0.000001

pair_modify     tail yes mix arithmetic
dielectric      1.0
special_bonds   lj/coul 0.0 0.0 1.0
box tilt        large
read_data       data.sow-4c_FeS-2c_B_S

#### Atom Groupings ####
group           fram     id   1:256
#### END Atom Groupings ####
